OpenVSP model (file version 5), 1 components.
Geometry view with OpenVSP parameter names; values to 6 digits, angles in degrees, lengths in the model's unit.
Overall bounding box: X_Min=-0.000152108 X_Len=0.500152 Y_Min=0 Y_Len=2 Z_Min=-0.00480478 Z_Len=0.0712907

Wing "CADSectionReferenceWing"
  location (X Y Z) 0 0 0, rotation 0 0 0
  bounding box size 0.500152 2 0.0712907
  totals: TotalSpan=2 TotalProjectedSpan=2 TotalChord=0.5 TotalArea=1 TotalAR=4 MAC=0.5
  root: chord 0.5, twist 0, airfoil file "BlueDog STEP midsection reflected Z; unvalidated rounded-edge Kutta model"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 BaseThickChord=0.0747107 ThickChord=0.0747107
  sections:
    n  Span  Root_Chord  Tip_Chord  Area  Sweep  Sweep_Location  Dihedral  Twist  Twist_Location  tip airfoil
    1  2     0.5         0.5        1     0      0               0         0      0.25            as above
